*Heading
** Job name: ic_test Model name: Model-1
** Generated by: Abaqus/CAE 2024
*Preprint, echo=NO, model=NO, history=NO, contact=NO
**
** PARTS
**
*Part, name=Part-1
*Node
      1, -0.219999999,           0.,           0.
      2, -0.217500001,           0.,           0.
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*Element, type=B32
  1,   1, 122,   2
  2,   2, 123,   3
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*Nset, nset=Set-1, generate
   1,  241,    1
*Elset, elset=Set-1, generate
   1,  120,    1
*Nset, nset=Set-2, generate
   1,  241,    1
*Elset, elset=Set-2, generate
   1,  120,    1
** Section: Section-1  Profile: Profile-1
*Beam Section, elset=Set-1, material=steel, temperature=GRADIENTS, section=RECT
0.025, 0.001
0.,0.,-1.
*End Part
**
**
** ASSEMBLY
**
*Assembly, name=Assembly
**
*Instance, name=Part-1-1, part=Part-1
*End Instance
**
*Nset, nset=Set-3, instance=Part-1-1
   1, 121
*Spring, elset=Springs/Dashpots-1-spring
1
X_STIFFNESS_HERE
*Element, type=Spring1, elset=Springs/Dashpots-1-spring
1, Part-1-1.1
2, Part-1-1.121
*Spring, elset=Springs/Dashpots-2-spring
2
Y_STIFFNESS_HERE
*Element, type=Spring1, elset=Springs/Dashpots-2-spring
3, Part-1-1.1
4, Part-1-1.121
*End Assembly
**
** MATERIALS
**
*Material, name=steel
*Density
7800.,
*Elastic
 2.05e+11, 0.3
**
** BOUNDARY CONDITIONS
**
** Name: BC-1 Type: Displacement/Rotation
*Boundary
Set-3, 3, 3
Set-3, 4, 4
